$PROB one cmpt simple
$SUB ADVAN1 TRANS2
$INPUT ID TIME DV CMT EVID AMT RATE
$DATA mdata/simple_nocovar_50id_6tp.csv IGNORE=@
$PK

TVCL = THETA(1)
TVV = THETA(2)

nCL = ETA(1)
nV = ETA(2)

CL = TVCL*EXP(nCL)
V = TVV*EXP(nV)
S1 = V

$ERROR
IPRED=F
Y = IPRED*(1 + ERR(1))

$THETA
(0, 2) ; TVCL
(0, 30) ; TVV

$OMEGA BLOCK(2)
0.1    ; nCL
0.1  0.1  ; nV

$SIGMA
0.03 ; PROP

$EST MAXEVAL=9999 PRINT=5 NOABORT METHOD=1 INTER POSTHOC
$COV PRINT=E MATRIX=R
$TABLE ID TIME IPRED DV CWRES PRED ONEHEADER NOAPPEND NOPRINT FILE=sdtab001
$TABLE ID CL V TVCL TVV nCL nV ONEHEADER FIRSTONLY NOPRINT NOAPPEND FILE=patab001
