Fri 12/09/2016
03:40 PM
$PROB one cmpt simple mu modeled
$SUB ADVAN1 TRANS2
$INPUT ID TIME DV CMT EVID AMT RATE
$DATA ..\mdata\simple_nocovar_50id_6tp.csv IGNORE=@
$PK

MU_1 = THETA(1)
MU_2 = THETA(2)

nCL = ETA(1)
nV = ETA(2)

CL = EXP(MU_1 + nCL)
V = EXP(MU_2 + nV)
S1 = V

$ERROR
IPRED=F
Y = IPRED*(1 + ERR(1))

$THETA
(0.001, 0.7) ; LN_TVCL
(0.001, 3.4) ; LN_TVV

$OMEGA BLOCK(2)
0.1    ; nCL
0.1  0.1  ; nV

$SIGMA
0.03 ; PROP

$EST MAXEVAL=9999 PRINT=5 NOABORT METHOD=1 INTER
$COV PRINT=E MATRIX=R
$TABLE ID TIME IPRED DV CWRES PRED ONEHEADER NOAPPEND NOPRINT FILE=sdtab002
$TABLE ID CL V MU_1 MU_2 nCL nV ONEHEADER FIRSTONLY NOPRINT NOAPPEND FILE=patab002

NM-TRAN MESSAGES
 WARNINGS AND ERRORS (IF ANY) FOR PROBLEM    1
 (WARNING  2) NM-TRAN INFERS THAT THE DATA ARE POPULATION.

1NONLINEAR MIXED EFFECTS MODEL PROGRAM (NONMEM) VERSION 7.4.0 alpha14 (nm74a14)
 ORIGINALLY DEVELOPED BY STUART BEAL, LEWIS SHEINER, AND ALISON BOECKMANN
 CURRENT DEVELOPERS ARE ROBERT BAUER, ICON DEVELOPMENT SOLUTIONS,
 AND ALISON BOECKMANN. IMPLEMENTATION, EFFICIENCY, AND STANDARDIZATION
 PERFORMED BY NOUS INFOSYSTEMS.
 PROBLEM NO.:         1
 one cmpt simple mu modeled
 TOT. NO. OF OBS RECS:      250
 TOT. NO. OF INDIVIDUALS:     50
 ONE COMPARTMENT MODEL (ADVAN1)
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 #TBLN:      1
 #METH: First Order Conditional Estimation with Interaction
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
 #TERM:
0MINIMIZATION SUCCESSFUL
 NO. OF FUNCTION EVALUATIONS USED:      320
 NO. OF SIG. DIGITS IN FINAL EST.:  3.3

 ETABAR IS THE ARITHMETIC MEAN OF THE ETA-ESTIMATES,
 AND THE P-VALUE IS GIVEN FOR THE NULL HYPOTHESIS THAT THE TRUE MEAN IS 0.

 ETABAR:         2.1804E-03 -6.6508E-03
 SE:             3.9685E-02  1.5943E-02
 N:                      50          50

 P VAL.:         9.5618E-01  6.7655E-01

 ETASHRINKSD(%)  4.0635E+00  2.7181E+01
 ETASHRINKVR(%)  7.9619E+00  4.6974E+01
 EBVSHRINKSD(%)  4.3891E+00  2.7625E+01
 EBVSHRINKVR(%)  8.5855E+00  4.7618E+01
 EPSSHRINKSD(%)  1.3852E+01
 EPSSHRINKVR(%)  2.5785E+01


 TOTAL DATA POINTS NORMALLY DISTRIBUTED (N):          250
 N*LOG(2PI) CONSTANT TO OBJECTIVE FUNCTION:    459.46926660233635
 OBJECTIVE FUNCTION VALUE WITHOUT CONSTANT:    825.92627911687157
 OBJECTIVE FUNCTION VALUE WITH CONSTANT:       1285.3955457192078
 REPORTED OBJECTIVE FUNCTION DOES NOT CONTAIN CONSTANT

 TOTAL EFFECTIVE ETAS (NIND*NETA):                           100


 #TERE:
 Elapsed estimation  time in seconds:     1.03
 Elapsed covariance  time in seconds:     0.26
 Elapsed postprocess time in seconds:     0.02

 ********************               FIRST ORDER CONDITIONAL ESTIMATION WITH INTERACTION              ********************
 #OBJT:**************                       MINIMUM VALUE OF OBJECTIVE FUNCTION                      ********************
 #OBJV:********************************************      825.926       **************************************************

 ********************               FIRST ORDER CONDITIONAL ESTIMATION WITH INTERACTION              ********************
 ********************                             FINAL PARAMETER ESTIMATE                           ********************

 THETA - VECTOR OF FIXED EFFECTS PARAMETERS   *********
         TH 1      TH 2
         1.23E+00  3.56E+00

 OMEGA - COV MATRIX FOR RANDOM EFFECTS - ETAS  ********
         ETA1      ETA2
 ETA1
+        8.73E-02
 ETA2
+        1.21E-02  2.45E-02

 SIGMA - COV MATRIX FOR RANDOM EFFECTS - EPSILONS  ****
         EPS1
 EPS1
+        4.75E-02

 OMEGA - CORR MATRIX FOR RANDOM EFFECTS - ETAS  *******
         ETA1      ETA2
 ETA1
+        2.95E-01
 ETA2
+        2.62E-01  1.56E-01

 SIGMA - CORR MATRIX FOR RANDOM EFFECTS - EPSILONS  ***
         EPS1
 EPS1
+        2.18E-01

 ********************               FIRST ORDER CONDITIONAL ESTIMATION WITH INTERACTION              ********************
 ********************                            STANDARD ERROR OF ESTIMATE                          ********************

 THETA - VECTOR OF FIXED EFFECTS PARAMETERS   *********
         TH 1      TH 2
         4.43E-02  3.18E-02

 OMEGA - COV MATRIX FOR RANDOM EFFECTS - ETAS  ********
         ETA1      ETA2
 ETA1
+        2.04E-02
 ETA2
+        1.02E-02  1.09E-02

 SIGMA - COV MATRIX FOR RANDOM EFFECTS - EPSILONS  ****
         EPS1
 EPS1
+        6.13E-03

 OMEGA - CORR MATRIX FOR RANDOM EFFECTS - ETAS  *******
         ETA1      ETA2
 ETA1
+        3.45E-02
 ETA2
+        1.93E-01  3.49E-02

 SIGMA - CORR MATRIX FOR RANDOM EFFECTS - EPSILONS  ***
         EPS1
 EPS1
+        1.41E-02

 ********************               FIRST ORDER CONDITIONAL ESTIMATION WITH INTERACTION              ********************
 ********************                          COVARIANCE MATRIX OF ESTIMATE                         ********************

            TH 1      TH 2      OM11      OM12      OM22      SG11
 TH 1
+        1.96E-03
 TH 2
+        4.38E-04  1.01E-03
 OM11
+        4.44E-06  5.99E-05  4.17E-04
 OM12
+        2.74E-05  2.66E-05  8.56E-05  1.04E-04
 OM22
+        6.36E-06  4.90E-05  2.36E-05  4.57E-05  1.19E-04
 SG11
+        2.74E-05  1.56E-05 -5.84E-06 -5.84E-06 -1.74E-05  3.76E-05

 ********************               FIRST ORDER CONDITIONAL ESTIMATION WITH INTERACTION              ********************
 ********************                          CORRELATION MATRIX OF ESTIMATE                        ********************

            TH 1      TH 2      OM11      OM12      OM22      SG11
 TH 1
+        4.43E-02
 TH 2
+        3.12E-01  3.18E-02
 OM11
+        4.91E-03  9.25E-02  2.04E-02
 OM12
+        6.07E-02  8.22E-02  4.12E-01  1.02E-02
 OM22
+        1.32E-02  1.41E-01  1.06E-01  4.12E-01  1.09E-02
 SG11
+        1.01E-01  7.99E-02 -4.67E-02 -9.34E-02 -2.60E-01  6.13E-03
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
 ********************               FIRST ORDER CONDITIONAL ESTIMATION WITH INTERACTION              ********************
 ********************                      EIGENVALUES OF COR MATRIX OF ESTIMATE                     ********************

             1         2         3         4         5         6
         4.37E-01  6.94E-01  7.46E-01  1.02E+00  1.35E+00  1.75E+00
 #CPUT: Total CPU Time in Seconds,        1.422
