Fri 12/09/2016
09:14 PM
$PROB one cmpt simple mu modeled bayes
$SUB ADVAN1 TRANS2
$INPUT ID TIME DV CMT EVID AMT RATE
$DATA ..\mdata\simple_nocovar_50id_6tp.csv IGNORE=@

$PRIOR NWPRI NTHETA=2 NETA=2, NTHP=2, NETP=2
$PK
;"USE NMBAYES_INT, ONLY: ITER_REPORT,BAYES_EXTRA_REQUEST,BAYES_EXTRA
; Request extra information for Bayesian analysis.
; An extra call will then be made for accepted samples
;"BAYES_EXTRA_REQUEST=1

MU_1 = THETA(1)
MU_2 = THETA(2)

nCL = ETA(1)
nV = ETA(2)

CL = EXP(MU_1 + nCL)
V = EXP(MU_2 + nV)
S1 = V

; "IF(BAYES_EXTRA==1 .AND. ITER_REPORT>=0 .AND. TIME==0.0) THEN
; "WRITE(50,98) ITER_REPORT,ID,CL,V
; "98 FORMAT(I12,1X,F14.0,4(1X,1PG12.5))
; "ENDIF

$ERROR
;"USE NMBAYES_INT, ONLY: ITER_REPORT,BAYES_EXTRA_REQUEST,BAYES_EXTRA
; "BAYES_EXTRA_REQUEST=1
IPRED=F
Y = IPRED*(1 + ERR(1))
;"IF(BAYES_EXTRA==1 .AND. ITER_REPORT>=0 ) THEN
;"WRITE(51,97) ITER_REPORT,ID,TIME,F
;"97 FORMAT(I12,1X,F14.0,2(1X,1PG12.5))
;"ENDIF

$THETA
(0.001, 0.7) ; LN_TVCL
(0.001, 3.4) ; LN_TVV

$OMEGA BLOCK(2)
0.1    ; nCL
0.1  0.1  ; nV

$SIGMA
0.03 ; PROP

; THETA PRIORS
$THETA (0.7 FIX) (3.4 FIX)
; THETA (uniformative) PRIORs
$OMEGA BLOCK(2)
10000 FIX
0.0 10000

$OMEGA BLOCK(2)
0.2 FIX
0 0.2

; degrees of freedom to prior omega matrix - low dof = highly uninformative
$THETA (2 FIX)

$EST METHOD=BAYES INTER NBURN=5000 NITER=5000 PRINT=20 NOPRIOR=0 CTYPE=3 CITER=10 SEED=12345

NM-TRAN MESSAGES
 WARNINGS AND ERRORS (IF ANY) FOR PROBLEM    1
 (WARNING  2) NM-TRAN INFERS THAT THE DATA ARE POPULATION.

1NONLINEAR MIXED EFFECTS MODEL PROGRAM (NONMEM) VERSION 7.4.0 alpha14 (nm74a14)
 ORIGINALLY DEVELOPED BY STUART BEAL, LEWIS SHEINER, AND ALISON BOECKMANN
 CURRENT DEVELOPERS ARE ROBERT BAUER, ICON DEVELOPMENT SOLUTIONS,
 AND ALISON BOECKMANN. IMPLEMENTATION, EFFICIENCY, AND STANDARDIZATION
 PERFORMED BY NOUS INFOSYSTEMS.
 PROBLEM NO.:         1
 one cmpt simple mu modeled bayes
 TOT. NO. OF OBS RECS:      250
 TOT. NO. OF INDIVIDUALS:     50
 ONE COMPARTMENT MODEL (ADVAN1)
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 #TBLN:      1
 #METH: MCMC Bayesian Analysis
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
 #TERM:
 STATISTICAL PORTION WAS COMPLETED

 TOTAL DATA POINTS NORMALLY DISTRIBUTED (N):          250
 N*LOG(2PI) CONSTANT TO OBJECTIVE FUNCTION:    459.46926660233635
 OBJECTIVE FUNCTION VALUE WITHOUT CONSTANT:    484.75972158324328
 OBJECTIVE FUNCTION VALUE WITH CONSTANT:       944.22898818557962
 REPORTED OBJECTIVE FUNCTION DOES NOT CONTAIN CONSTANT

 TOTAL EFFECTIVE ETAS (NIND*NETA):                           100
 NIND*NETA*LOG(2PI) CONSTANT TO OBJECTIVE FUNCTION:    183.78770664093454
 OBJECTIVE FUNCTION VALUE WITHOUT CONSTANT:    484.75972158324328
 OBJECTIVE FUNCTION VALUE WITH CONSTANT:       668.54742822417779
 REPORTED OBJECTIVE FUNCTION DOES NOT CONTAIN CONSTANT

 PRIOR CONSTANT TO OBJECTIVE FUNCTION:    30.823646298206345
 OBJECTIVE FUNCTION VALUE WITHOUT CONSTANT:    484.75972158324328
 OBJECTIVE FUNCTION VALUE WITH CONSTANT:       515.58336788144959
 REPORTED OBJECTIVE FUNCTION DOES NOT CONTAIN CONSTANT


 #TERE:
 Elapsed estimation  time in seconds:    16.28
 Elapsed covariance  time in seconds:     0.00

 ********************                              MCMC BAYESIAN ANALYSIS                            ********************
 #OBJT:**************                       AVERAGE VALUE OF LIKELIHOOD FUNCTION                     ********************
 #OBJV:********************************************      484.760       **************************************************
 #OBJS:********************************************       17.601 (STD) **************************************************

 ********************                              MCMC BAYESIAN ANALYSIS                            ********************
 ********************                             FINAL PARAMETER ESTIMATE                           ********************

 THETA - VECTOR OF FIXED EFFECTS PARAMETERS   *********
         TH 1      TH 2
         1.20E+00  3.56E+00

 OMEGA - COV MATRIX FOR RANDOM EFFECTS - ETAS  ********
         ETA1      ETA2
 ETA1
+        1.01E-01
 ETA2
+        1.36E-02  4.42E-02

 SIGMA - COV MATRIX FOR RANDOM EFFECTS - EPSILONS  ****
         EPS1
 EPS1
+        4.66E-02

 OMEGA - CORR MATRIX FOR RANDOM EFFECTS - ETAS  *******
         ETA1      ETA2
 ETA1
+        3.15E-01
 ETA2
+        2.00E-01  2.08E-01

 SIGMA - CORR MATRIX FOR RANDOM EFFECTS - EPSILONS  ***
         EPS1
 EPS1
+        2.16E-01

 ********************                              MCMC BAYESIAN ANALYSIS                            ********************
 ********************                STANDARD ERROR OF ESTIMATE (From Sample Variance)               ********************

 THETA - VECTOR OF FIXED EFFECTS PARAMETERS   *********
         TH 1      TH 2
         4.75E-02  3.73E-02

 OMEGA - COV MATRIX FOR RANDOM EFFECTS - ETAS  ********
         ETA1      ETA2
 ETA1
+        2.26E-02
 ETA2
+        1.25E-02  1.24E-02

 SIGMA - COV MATRIX FOR RANDOM EFFECTS - EPSILONS  ****
         EPS1
 EPS1
+        5.32E-03

 OMEGA - CORR MATRIX FOR RANDOM EFFECTS - ETAS  *******
         ETA1      ETA2
 ETA1
+        3.48E-02
 ETA2
+        1.68E-01  2.89E-02

 SIGMA - CORR MATRIX FOR RANDOM EFFECTS - EPSILONS  ***
         EPS1
 EPS1
+        1.23E-02

 ********************                              MCMC BAYESIAN ANALYSIS                            ********************
 ********************               COVARIANCE MATRIX OF ESTIMATE (From Sample Variance)             ********************

            TH 1      TH 2      OM11      OM12      OM22      SG11
 TH 1
+        2.26E-03
 TH 2
+        4.18E-04  1.39E-03
 OM11
+        9.46E-07  5.31E-05  5.11E-04
 OM12
+        2.14E-05  3.74E-06  9.51E-05  1.56E-04
 OM22
+       -8.82E-06  5.59E-06  2.30E-05  4.72E-05  1.55E-04
 SG11
+        1.55E-05  1.82E-05 -5.57E-06 -4.27E-06 -6.57E-06  2.83E-05

 ********************                              MCMC BAYESIAN ANALYSIS                            ********************
 ********************              CORRELATION MATRIX OF ESTIMATE (From Sample Variance)             ********************

            TH 1      TH 2      OM11      OM12      OM22      SG11
 TH 1
+        4.75E-02
 TH 2
+        2.36E-01  3.73E-02
 OM11
+        8.80E-04  6.30E-02  2.26E-02
 OM12
+        3.60E-02  8.01E-03  3.36E-01  1.25E-02
 OM22
+       -1.49E-02  1.20E-02  8.17E-02  3.03E-01  1.24E-02
 SG11
+        6.12E-02  9.16E-02 -4.63E-02 -6.42E-02 -9.91E-02  5.32E-03
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 Elapsed postprocess time in seconds:     0.00
 #CPUT: Total CPU Time in Seconds,       16.281
