$PROB one cmpt simple mu modeled bayes
$SUB ADVAN1 TRANS2
$INPUT ID TIME DV CMT EVID AMT RATE
$DATA mdata/simple_nocovar_50id_6tp.csv IGNORE=@

$PRIOR NWPRI NTHETA=2 NETA=2, NTHP=2, NETP=2
$PK
;"USE NMBAYES_INT, ONLY: ITER_REPORT,BAYES_EXTRA_REQUEST,BAYES_EXTRA
; Request extra information for Bayesian analysis.
; An extra call will then be made for accepted samples
;"BAYES_EXTRA_REQUEST=1

MU_1 = THETA(1)
MU_2 = THETA(2)

nCL = ETA(1)
nV = ETA(2)

CL = EXP(MU_1 + nCL)
V = EXP(MU_2 + nV)
S1 = V

; "IF(BAYES_EXTRA==1 .AND. ITER_REPORT>=0 .AND. TIME==0.0) THEN
; "WRITE(50,98) ITER_REPORT,ID,CL,V
; "98 FORMAT(I12,1X,F14.0,4(1X,1PG12.5))
; "ENDIF

$ERROR
;"USE NMBAYES_INT, ONLY: ITER_REPORT,BAYES_EXTRA_REQUEST,BAYES_EXTRA
; "BAYES_EXTRA_REQUEST=1
IPRED=F
Y = IPRED*(1 + ERR(1))
;"IF(BAYES_EXTRA==1 .AND. ITER_REPORT>=0 ) THEN
;"WRITE(51,97) ITER_REPORT,ID,TIME,F
;"97 FORMAT(I12,1X,F14.0,2(1X,1PG12.5))
;"ENDIF

$THETA
(0.001, 0.7) ; LN_TVCL
(0.001, 3.4) ; LN_TVV

$OMEGA BLOCK(2)
0.1    ; nCL
0.1  0.1  ; nV

$SIGMA
0.03 ; PROP

; THETA PRIORS
$THETA (0.7 FIX) (3.4 FIX)
; THETA (uniformative) PRIORs
$OMEGA BLOCK(2)
10000 FIX
0.0 10000

$OMEGA BLOCK(2)
0.2 FIX
0 0.2

; degrees of freedom to prior omega matrix - low dof = highly uninformative
$THETA (2 FIX)

$EST METHOD=BAYES INTER NBURN=5000 NITER=5000 PRINT=20 NOPRIOR=0 CTYPE=3 CITER=10 SEED=12345
