Sat 12/10/2016
04:10 PM
$PROB one cmpt simple mu modeled bayes
$SUB ADVAN1 TRANS2
$INPUT ID TIME DV CMT EVID AMT RATE
$DATA ..\mdata\simple_nocovar_50id_6tp.csv IGNORE=@
$ABBR REPLACE THETA(CL, V) = THETA(1 to 2)
$ABBR REPLACE ETA(CL, V) = ETA(1 to 2)

$THETAI
THETA(1:NTHETA)=LOG(THETAI(1:NTHETA))
THETAP(1:NTHETAP)=LOG(THETAPI(1:NTHETAP))
$THETAR
THETAR(1:NTHETA)=EXP(THETA(1:NTHETA))
THETAPR(1:NTHETAP)=EXP(THETAP(1:NTHETAP))

$PRIOR NWPRI

$PK
"USE NMBAYES_INT, ONLY: ITER_REPORT,BAYES_EXTRA_REQUEST,BAYES_EXTRA
; Request extra information for Bayesian analysis.
; An extra call will then be made for accepted samples
"BAYES_EXTRA_REQUEST=1

MU_1 = THETA(CL)
MU_2 = THETA(V)
CL = EXP(MU_1 + ETA(CL))
V = EXP(MU_2 + ETA(V))
S1 = V

"IF(BAYES_EXTRA==1 .AND. ITER_REPORT>=0 .AND. TIME==0.0) THEN
"WRITE(50,98) ITER_REPORT,ID,CL,V
"98 FORMAT(I12,1X,F14.0,4(1X,1PG12.5))
"ENDIF

$ERROR
"USE NMBAYES_INT, ONLY: ITER_REPORT,BAYES_EXTRA_REQUEST,BAYES_EXTRA
"BAYES_EXTRA_REQUEST=1
IPRED=F
Y = IPRED*(1 + ERR(1))
"IF(BAYES_EXTRA==1 .AND. ITER_REPORT>=0 ) THEN
"WRITE(51,97) ITER_REPORT,ID,TIME,F
"97 FORMAT(I12,1X,F14.0,2(1X,1PG12.5))
"ENDIF

$THETA
(0.001, 3) ; TVCL
(0.001, 34) ; TVV

$OMEGA BLOCK(2)
0.1    ; nCL
0.1  0.1  ; nV

$SIGMA
0.03 ; PROP

; THETA PRIORS
$THETAP (3 FIX) (34 FIX)

; THETA (uniformative) PRIORs
$THETAPV BLOCK(2)
10000 FIX
0.0 10000

$OMEGAP BLOCK(2)
0.2 FIX
0 0.2

; degrees of freedom to prior omega matrix - low dof = highly uninformative
$OMEGAPD (2 FIX)

$EST METHOD=CHAIN FILE=..\run006chains.chn NSAMPLE=0 ISAMPLE=1 DF=20
$EST METHOD=BAYES INTER NBURN=4000 NITER=10000 PRINT=20 NOPRIOR=0 CTYPE=3 CITER=10 SEED=60339

NM-TRAN MESSAGES
 WARNINGS AND ERRORS (IF ANY) FOR PROBLEM    1
 (WARNING  2) NM-TRAN INFERS THAT THE DATA ARE POPULATION.
 (MU_WARNING 20) MU_001: MU_ VARIABLE SHOULD NOT BE DEFINED AFTER VERBATIM CODE.

1NONLINEAR MIXED EFFECTS MODEL PROGRAM (NONMEM) VERSION 7.4.0 alpha14 (nm74a14)
 ORIGINALLY DEVELOPED BY STUART BEAL, LEWIS SHEINER, AND ALISON BOECKMANN
 CURRENT DEVELOPERS ARE ROBERT BAUER, ICON DEVELOPMENT SOLUTIONS,
 AND ALISON BOECKMANN. IMPLEMENTATION, EFFICIENCY, AND STANDARDIZATION
 PERFORMED BY NOUS INFOSYSTEMS.
 PROBLEM NO.:         1
 one cmpt simple mu modeled bayes
 TOT. NO. OF OBS RECS:      250
 TOT. NO. OF INDIVIDUALS:     50
 ONE COMPARTMENT MODEL (ADVAN1)
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 #TBLN:      1
 #METH: Chain Method Processing
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 #TBLN:      1
 #METH: MCMC Bayesian Analysis
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
 #TERM:
 STATISTICAL PORTION WAS COMPLETED

 TOTAL DATA POINTS NORMALLY DISTRIBUTED (N):          250
 N*LOG(2PI) CONSTANT TO OBJECTIVE FUNCTION:    459.46926660233635
 OBJECTIVE FUNCTION VALUE WITHOUT CONSTANT:    484.85231017569902
 OBJECTIVE FUNCTION VALUE WITH CONSTANT:       944.32157677803536
 REPORTED OBJECTIVE FUNCTION DOES NOT CONTAIN CONSTANT

 TOTAL EFFECTIVE ETAS (NIND*NETA):                           100
 NIND*NETA*LOG(2PI) CONSTANT TO OBJECTIVE FUNCTION:    183.78770664093454
 OBJECTIVE FUNCTION VALUE WITHOUT CONSTANT:    484.85231017569902
 OBJECTIVE FUNCTION VALUE WITH CONSTANT:       668.64001681663353
 REPORTED OBJECTIVE FUNCTION DOES NOT CONTAIN CONSTANT

 PRIOR CONSTANT TO OBJECTIVE FUNCTION:    30.823646298206345
 OBJECTIVE FUNCTION VALUE WITHOUT CONSTANT:    484.85231017569902
 OBJECTIVE FUNCTION VALUE WITH CONSTANT:       515.67595647390533
 REPORTED OBJECTIVE FUNCTION DOES NOT CONTAIN CONSTANT


 #TERE:
 Elapsed estimation  time in seconds:    90.39
 Elapsed covariance  time in seconds:     0.00

 ********************                              MCMC BAYESIAN ANALYSIS                            ********************
 #OBJT:**************                       AVERAGE VALUE OF LIKELIHOOD FUNCTION                     ********************
 #OBJV:********************************************      484.852       **************************************************
 #OBJS:********************************************       17.201 (STD) **************************************************

 ********************                              MCMC BAYESIAN ANALYSIS                            ********************
 ********************                             FINAL PARAMETER ESTIMATE                           ********************

 THETA - VECTOR OF FIXED EFFECTS PARAMETERS   *********
         THETA(CL) THETA(V)
         3.32E+00  3.50E+01

 OMEGA - COV MATRIX FOR RANDOM EFFECTS - ETAS  ********
         ETA(CL)   ETA(V)
 ETA(CL)
+        1.00E-01
 ETA(V)
+        1.38E-02  4.45E-02

 SIGMA - COV MATRIX FOR RANDOM EFFECTS - EPSILONS  ****
         EPS1
 EPS1
+        4.66E-02

 OMEGA - CORR MATRIX FOR RANDOM EFFECTS - ETAS  *******
         ETA(CL)   ETA(V)
 ETA(CL)
+        3.15E-01
 ETA(V)
+        2.01E-01  2.09E-01

 SIGMA - CORR MATRIX FOR RANDOM EFFECTS - EPSILONS  ***
         EPS1
 EPS1
+        2.15E-01

 ********************                              MCMC BAYESIAN ANALYSIS                            ********************
 ********************                STANDARD ERROR OF ESTIMATE (From Sample Variance)               ********************

 THETA - VECTOR OF FIXED EFFECTS PARAMETERS   *********
         THETA(CL) THETA(V)
         1.58E-01  1.31E+00

 OMEGA - COV MATRIX FOR RANDOM EFFECTS - ETAS  ********
         ETA(CL)   ETA(V)
 ETA(CL)
+        2.27E-02
 ETA(V)
+        1.27E-02  1.26E-02

 SIGMA - COV MATRIX FOR RANDOM EFFECTS - EPSILONS  ****
         EPS1
 EPS1
+        5.30E-03

 OMEGA - CORR MATRIX FOR RANDOM EFFECTS - ETAS  *******
         ETA(CL)   ETA(V)
 ETA(CL)
+        3.50E-02
 ETA(V)
+        1.70E-01  2.90E-02

 SIGMA - CORR MATRIX FOR RANDOM EFFECTS - EPSILONS  ***
         EPS1
 EPS1
+        1.22E-02

 ********************                              MCMC BAYESIAN ANALYSIS                            ********************
 ********************               COVARIANCE MATRIX OF ESTIMATE (From Sample Variance)             ********************

            TH 1      TH 2      OM11      OM12      OM22      SG11
 TH 1
+        2.48E-02
 TH 2
+        5.52E-02  1.72E+00
 OM11
+       -1.78E-05  1.88E-03  5.14E-04
 OM12
+        9.24E-05  4.37E-04  9.93E-05  1.61E-04
 OM22
+       -1.84E-05  3.00E-04  2.75E-05  5.81E-05  1.58E-04
 SG11
+        5.14E-05  6.70E-04 -2.45E-06 -3.70E-06 -5.60E-06  2.81E-05

 ********************                              MCMC BAYESIAN ANALYSIS                            ********************
 ********************              CORRELATION MATRIX OF ESTIMATE (From Sample Variance)             ********************

            TH 1      TH 2      OM11      OM12      OM22      SG11
 TH 1
+        1.58E-01
 TH 2
+        2.67E-01  1.31E+00
 OM11
+       -4.97E-03  6.33E-02  2.27E-02
 OM12
+        4.61E-02  2.63E-02  3.45E-01  1.27E-02
 OM22
+       -9.27E-03  1.82E-02  9.65E-02  3.63E-01  1.26E-02
 SG11
+        6.15E-02  9.65E-02 -2.04E-02 -5.49E-02 -8.40E-02  5.30E-03
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 Elapsed postprocess time in seconds:     0.00
 #CPUT: Total CPU Time in Seconds,       89.188
