Tue 01/03/2017
10:28 PM
$PROB one cmpt simple mu modeled bayes multidose nids: 36 scenario: tr
;; based_on: run100
$SUB ADVAN1 TRANS2
$INPUT ID TIME DV OBSNUM CMT EVID AMT RATE ADDL II
$DATA ..\..\mdata\simple_nocovar_56id_6tp_md.csv
IGNORE=@
IGNORE=(OBSNUM.EQN.1)
IGNORE=(OBSNUM.EQN.2)
IGNORE=(OBSNUM.EQN.4)
IGNORE=(OBSNUM.EQN.5)
IGNORE=(OBSNUM.EQN.6)
IGNORE=(ID.GT.36)
$ABBR REPLACE THETA(CL, V) = THETA(1 to 2)
$ABBR REPLACE ETA(CL, V) = ETA(1 to 2)

$THETAI
THETA(1:NTHETA)=LOG(THETAI(1:NTHETA))
THETAP(1:NTHETAP)=LOG(THETAPI(1:NTHETAP))
$THETAR
THETAR(1:NTHETA)=EXP(THETA(1:NTHETA))
THETAPR(1:NTHETAP)=EXP(THETAP(1:NTHETAP))

$PRIOR NWPRI

$PK
"USE NMBAYES_INT, ONLY: ITER_REPORT,BAYES_EXTRA_REQUEST,BAYES_EXTRA
; Request extra information for Bayesian analysis.
; An extra call will then be made for accepted samples
"BAYES_EXTRA_REQUEST=1

MU_1 = THETA(CL)
MU_2 = THETA(V)
CL = EXP(MU_1 + ETA(CL))
V = EXP(MU_2 + ETA(V))
S1 = V

"IF(BAYES_EXTRA==1 .AND. ITER_REPORT>=0 .AND. TIME==0.0) THEN
"WRITE(50,98) ITER_REPORT,ID,CL,V
"98 FORMAT(I12,1X,F14.0,4(1X,1PG12.5))
"ENDIF

$ERROR
IPRED=F
Y = IPRED*(1 + ERR(1))

$THETA
(0.001, 2.5) ; TVCL
(0.001, 46) ; TVV

$OMEGA BLOCK(2)
0.1    ; nCL
0.1  0.1  ; nV

$SIGMA
0.03 ; PROP

; THETA PRIORS
$THETAP (2.5 FIX) (46 FIX)

; THETA (uniformative) PRIORs
$THETAPV BLOCK(2)
10000 FIX
0.0 10000

$OMEGAP BLOCK(2)
0.2 FIX
0 0.2

; degrees of freedom to prior omega matrix - low dof = highly uninformative
$OMEGAPD (2 FIX)

$EST METHOD=CHAIN FILE=..\run100.chn NSAMPLE=0 ISAMPLE=3 DF=20
$EST METHOD=BAYES INTER NBURN=4000 NITER=10000 PRINT=20 NOPRIOR=0 CTYPE=3 CITER=10 SEED=56664

NM-TRAN MESSAGES
 WARNINGS AND ERRORS (IF ANY) FOR PROBLEM    1
 (WARNING  2) NM-TRAN INFERS THAT THE DATA ARE POPULATION.
 (MU_WARNING 20) MU_001: MU_ VARIABLE SHOULD NOT BE DEFINED AFTER VERBATIM CODE.

1NONLINEAR MIXED EFFECTS MODEL PROGRAM (NONMEM) VERSION 7.4.0 alpha14 (nm74a14)
 ORIGINALLY DEVELOPED BY STUART BEAL, LEWIS SHEINER, AND ALISON BOECKMANN
 CURRENT DEVELOPERS ARE ROBERT BAUER, ICON DEVELOPMENT SOLUTIONS,
 AND ALISON BOECKMANN. IMPLEMENTATION, EFFICIENCY, AND STANDARDIZATION
 PERFORMED BY NOUS INFOSYSTEMS.
 PROBLEM NO.:         1
 one cmpt simple mu modeled bayes multidose nids: 36 scenario: tr
 TOT. NO. OF OBS RECS:       36
 TOT. NO. OF INDIVIDUALS:     36
 ONE COMPARTMENT MODEL (ADVAN1)
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 #TBLN:      1
 #METH: Chain Method Processing
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 #TBLN:      1
 #METH: MCMC Bayesian Analysis
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
 #TERM:
 STATISTICAL PORTION WAS COMPLETED

 TOTAL DATA POINTS NORMALLY DISTRIBUTED (N):           36
 N*LOG(2PI) CONSTANT TO OBJECTIVE FUNCTION:    66.163574390736429
 OBJECTIVE FUNCTION VALUE WITHOUT CONSTANT:   -114.13259337328033
 OBJECTIVE FUNCTION VALUE WITH CONSTANT:      -47.969018982543901
 REPORTED OBJECTIVE FUNCTION DOES NOT CONTAIN CONSTANT

 TOTAL EFFECTIVE ETAS (NIND*NETA):                            72
 NIND*NETA*LOG(2PI) CONSTANT TO OBJECTIVE FUNCTION:    132.32714878147286
 OBJECTIVE FUNCTION VALUE WITHOUT CONSTANT:   -114.13259337328033
 OBJECTIVE FUNCTION VALUE WITH CONSTANT:       18.194555408192528
 REPORTED OBJECTIVE FUNCTION DOES NOT CONTAIN CONSTANT

 PRIOR CONSTANT TO OBJECTIVE FUNCTION:    30.823646298206345
 OBJECTIVE FUNCTION VALUE WITHOUT CONSTANT:   -114.13259337328033
 OBJECTIVE FUNCTION VALUE WITH CONSTANT:      -83.308947075073988
 REPORTED OBJECTIVE FUNCTION DOES NOT CONTAIN CONSTANT


 #TERE:
 Elapsed estimation  time in seconds:    32.48
 Elapsed covariance  time in seconds:     0.00

 ********************                              MCMC BAYESIAN ANALYSIS                            ********************
 #OBJT:**************                       AVERAGE VALUE OF LIKELIHOOD FUNCTION                     ********************
 #OBJV:********************************************     -114.133       **************************************************
 #OBJS:********************************************      151.905 (STD) **************************************************

 ********************                              MCMC BAYESIAN ANALYSIS                            ********************
 ********************                             FINAL PARAMETER ESTIMATE                           ********************

 THETA - VECTOR OF FIXED EFFECTS PARAMETERS   *********
         THETA(CL) THETA(V)
         6.10E-01  5.42E+01

 OMEGA - COV MATRIX FOR RANDOM EFFECTS - ETAS  ********
         ETA(CL)   ETA(V)
 ETA(CL)
+        2.42E-01
 ETA(V)
+        4.53E-03  1.66E-01

 SIGMA - COV MATRIX FOR RANDOM EFFECTS - EPSILONS  ****
         EPS1
 EPS1
+        1.25E-02

 OMEGA - CORR MATRIX FOR RANDOM EFFECTS - ETAS  *******
         ETA(CL)   ETA(V)
 ETA(CL)
+        4.41E-01
 ETA(V)
+        1.05E-01  3.96E-01

 SIGMA - CORR MATRIX FOR RANDOM EFFECTS - EPSILONS  ***
         EPS1
 EPS1
+        7.37E-02

 ********************                              MCMC BAYESIAN ANALYSIS                            ********************
 ********************                STANDARD ERROR OF ESTIMATE (From Sample Variance)               ********************

 THETA - VECTOR OF FIXED EFFECTS PARAMETERS   *********
         THETA(CL) THETA(V)
         1.19E+00  3.24E+01

 OMEGA - COV MATRIX FOR RANDOM EFFECTS - ETAS  ********
         ETA(CL)   ETA(V)
 ETA(CL)
+        3.16E-01
 ETA(V)
+        1.05E-01  8.37E-02

 SIGMA - COV MATRIX FOR RANDOM EFFECTS - EPSILONS  ****
         EPS1
 EPS1
+        2.29E-02

 OMEGA - CORR MATRIX FOR RANDOM EFFECTS - ETAS  *******
         ETA(CL)   ETA(V)
 ETA(CL)
+        2.18E-01
 ETA(V)
+        4.46E-01  9.52E-02

 SIGMA - CORR MATRIX FOR RANDOM EFFECTS - EPSILONS  ***
         EPS1
 EPS1
+        8.39E-02

 ********************                              MCMC BAYESIAN ANALYSIS                            ********************
 ********************               COVARIANCE MATRIX OF ESTIMATE (From Sample Variance)             ********************

            TH 1      TH 2      OM11      OM12      OM22      SG11
 TH 1
+        1.43E+00
 TH 2
+       -3.45E+01  1.05E+03
 OM11
+       -1.28E-01  3.45E+00  9.96E-02
 OM12
+        3.06E-02 -8.24E-01 -7.19E-03  1.10E-02
 OM22
+        1.50E-02 -2.94E-01  1.21E-04 -1.56E-03  7.01E-03
 SG11
+       -1.58E-03  9.59E-02 -7.06E-05 -2.29E-04 -3.27E-04  5.24E-04

 ********************                              MCMC BAYESIAN ANALYSIS                            ********************
 ********************              CORRELATION MATRIX OF ESTIMATE (From Sample Variance)             ********************

            TH 1      TH 2      OM11      OM12      OM22      SG11
 TH 1
+        1.19E+00
 TH 2
+       -8.90E-01  3.24E+01
 OM11
+       -3.41E-01  3.37E-01  3.16E-01
 OM12
+        2.45E-01 -2.42E-01 -2.17E-01  1.05E-01
 OM22
+        1.50E-01 -1.08E-01  4.59E-03 -1.77E-01  8.37E-02
 SG11
+       -5.76E-02  1.29E-01 -9.77E-03 -9.56E-02 -1.71E-01  2.29E-02
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 Elapsed postprocess time in seconds:     0.00
 #CPUT: Total CPU Time in Seconds,       26.703
